# Fictive dataset: Power grid mix; AC; consumption mix, to consumer; 220 V

Dataset: ILCD process, Partly terminated system
Geography: DE
Sub-locations: DE
Reference year: 1999
Valid until: 2004
Classification: Energy carriers and technologies / Electricity
Synonyms: electricidade; energia eletrica
Functional unit: Provision of 1 MJ electricity (AC) at 220 V to the consumer
LCI method principle: Attributional
LCI method approaches: Allocation - market value; Allocation - ability to bear
Completeness: All relevant flows quantified
Share of supply or production covered: 95 %
Included processes: Hard coal power plant; Lignite power plant; Natural gas power plant; Wind power plant; Fuel oil power plant
Method details: XY Consult LCI methodology report 2000; Another LCI methodology report (DOC)
Project: Internet Site on Life Cycle Assessment Tools and Services and Life Cycle Inventory Data in support of European Integrated Product Policy, Reference: ENV.A.2/SER/2003/0110
Generated by: XY consulting Ltd.
Registration number: 1-2454-341
Owner: ELECTRIC Association
Compliance: ILCD Compliance
Review: Dependent internal review by XY Consultants Ltd., LCA-Authority Organization ABC
Data quality: Technological representativeness: Very good; Geographical representativeness: Very good
Amounts: no units in this file; such an amount is in the reference unit of its flow, which a separate flow dataset defines
copyright: true
licenseType: Free of charge for all users and uses
accessRestrictions: None, but when using the data set, reference to the owner of data set is to be provided by citing the entry in the respective
"ownership" contact data set.
accessRestrictions: Keine, aber wenn der Datensatz benutzt wird, muss eine Referenz auf den Eigentümer gesetzt werden.

## General comment
Good overall data quality. Energy carrier mix information based on official statistical information including import/export. Detailed
power plant models were used, which combine measured emissions plus calculated values for not measured emissions of e.g. single organics and heavy metals. Energy carrier
extraction and processing data is of sufficient to good (e.g. refinery) data quality. Inventory is partly based on primary industry data, partly on secondary literature
data.

## Geography
Average data for Germany. If specific electricity supplier is used (e.g. for site specific modelling), the mix might be different
(e.g. if regional wind power electricity is contracted). No further restrictions.

## Sub-locations
Average data for Germany, no individual sub-locations explicitely considered and combined.

## Time period
Whole year; average mix across seasonal variations.

## Technology and included processes
The electricity consumption mix consists of 25.57 % Hard coal power plant, 27.57 % Lignite power plant, 35.91 %
Nuclear power plant, 5.84 % Natural gas power plant, 0.54 % Crude oil power plant, 4.09 % Hydro power plant, 0.31 % Wind power plant, 0.46 % Waste incineration plant, 0.13
% Biomass power plant. Other relevant included process are the refinery and the energy carrier exploitation and extraction processes (the latter ones are not separately
available).

## Technical purpose
Use for (typically small to medium) electrical appliances at 220 V AC.

## Model description
Super model for test.

## Parameters
- so2: 0.00032; = s*2; max 0.2
  [kg] Typical range 0.5E-4 to 5E-4kg/MJ electr. Calculates SO2 emissions from a manually entered S-content. Testdummy
- s: 0.00016; max 0.05
  [kg/kg] Sulfur content of fuel.

## Reference product
- Electricity; AC; 220 V: 1; measured; allocated 100 % to Electricity; AC; 220 V

## Inputs
- Natural gas: 0.0041; normal SD95 5 %; measured; allocated 50 % to Electricity; AC; 220 V
- Hard coal: 0.0295; min 0.027; max 0.031; uniform; estimated; allocated 100 % to Electricity; AC; 220 V; source Other source, page 47. (Reference to corresponding data source for the data of the Uniform distribution min and max values)
  No usable measured data. Uniformly distributed data had to be assumed, according to "Other source".
- Crude oil: 0.0013; normal SD95 4 %; measured; allocated 100 % to Electricity; AC; 220 V
- Lignite: 0.1; normal SD95 7 %; estimated; allocated 100 % to Electricity; AC; 220 V
- Electricity; AC; 220 V: 0.06; normal SD95 15 %; General reminder flow; estimated; allocated 100 % to Electricity; AC; 220 V
  Illustrative Reminder flow of power plants' internal electricity consumption over cradle-to-gate.

## Outputs
All rows: allocated 100 % to Electricity; AC; 220 V
- Carbon dioxide - Emissions to air: 0.19; log-normal SD95 4 %; calculated
- Carbon monoxide - Emissions to air: 4e-5; log-normal SD95 12 %; measured
- Sulphur dioxide - Emissions to air [RER]: 0.00032; = 0.00032 * so2; log-normal SD95 4 %
  Example of SO2 calculation in parameterised data set via the variable so2 of the "Mathematical model" section. Note that uncertainty values of
  the Mathematical model section and those given here overlay each other.
- Nitrogen oxides - Emissions to air: 0.00016; log-normal SD95 15 %
- Particles 0.2 to 2 µm - Emissions to air: 5e-5; log-normal SD95 20 %; estimated

## Impact indicators
- Super2007 LCIA method: 3.14159
  Super2007 single-indicator cradle-to-gate LCIA result of this unit process data set after completing the inventory with the 2005 inventory data
  of the SuPi LCA database.
- another LCIA method: 3.14159

## Modelling constants
All data used in the calculation of the LCI results refer to net calorific value. For the transport of energy carriers average transport
processes (ship, pipeline, rail, road) are used.

## Cut-off and completeness
Cut-off rules for each unit coverage of at least 95 % of mass and energy of the Input and of the Output flows, and 98 % of
their environmental relevance (according to expert judgement).

## Deviations from cut-off and completeness
The coverage for the exploration data is only 90% of mass and energy and 95% of the environmental relevance
(expert judgement).

## Data selection and combination
The data sources for the complete product system are sufficiently consistent: The grid mix data is based on national
statistics. The key emissions, e.g. carbon dioxide, sulphur dioxide, etc., of the power plants are based on measured operating data. All other emissions from the power
plants are based on literature data and/or calculated via energy carrier composition in combination with (literature-based) combustion models. The data on the energy
carrier supply chain is based on statistics with country-wise transport distances and energy carrier composition, as well as industry and literature data on the inventory
of exploration and extraction. Refinery data are based on measurements of major refineries. Grid losses are taken from national statistics. LCI modelling is fully
consistent.

## Data treatment and extrapolations
Energy carrier specific power plants are modelled according to national combustion technology mix. Data measured at
representative power plants for each of the main power plant types have been upscaled to the country mix of power plant
technologies.

## Annual supply or production volume
15000 MWh

## Sampling procedure
Energy carriers production total annual production volume; emission factors from 5 samples during the year. Land use from maps of producers.
Electric. conversion: total annual production volume measured. Emissions as daily 30 min average values (random sampling time).

## Data collection period
1999 to 2005

## Use advice
No special use advice; grid losses are included. (This data set is intended exclusively to show the rough use of (almost) all documentation
fields, NOT good documentation or LCA practice or a consistent/valid data set.)

## Completeness
Noise-XY-Indicator; A. Braun (2005): A novel method for the integration of noise into LCA. SuperPublishing. 12/2005 pp
23-35.

## Review details
The dataset is of adequate data quality in view of the intended use as well as stated geographical and technology coverage. No other
aspect has been reviewed. The LCI method applied is in compliance with ISO 14040 ff. The documentation includes all relevant information in view of data quality and scope
of application of the respective LCI result. Dataset represents state of the art in view of the referenced functional unit. The energy balance is closed. The discrepancy
in the mass balance fits to the documented method of not considering air input to incineration etc.

## Other review details
no further comments after publication were received/documented

## Data sources
- Electricity Information 1995 from ELECTRIC Energy association
- Another data source

## Intended applications
Publication as background data for use in LCA studies, except for comparative assertions diclosed to the public, which need an
independent external review
