# Truck, Euro 5, 14 - 20t gross weight / 11.4t payload capacity, consumption mix, diesel driven, Euro 5, cargo, 14 - 20t gross weight / 11.4t payload capacity

Dataset: ILCD process, Unit process, black box
Geography: GLO
Reference year: 2018
Valid until: 2021
Classification: Transport services / Road
LCI method principle: Other
Generated by: Institute for Acoustics and Building Physics, Life Cycle Engineering (GaBi), Universitaet Stuttgart
Owner: thinkstep AG
Review: Not reviewed by thinkstep AG
Amounts: no units in this file; such an amount is in the reference unit of its flow, which a separate flow dataset defines
copyright: true
accessRestrictions: GaBi (source code, database including extension modules and single data sets, documentation) remains property of thinkstep AG. thinkstep AG delivers GaBi licenses comprising data storage medium and manual as ordered by the customer. The license guarantees the right of use for one installation of GaBi. Further installations using the same license are not permitted. Additional licenses are only valid if the licensee holds at least one main license. Licenses are not transferable and must only be used within the licensee's organisation. Data sets may be copied for internal use. The number of copies is restricted to the number of licenses of the software system GaBi the licensee owns. The right of use is exclusively valid for the licensee. All rights reserved.

## General comment
- average emission values Euro 5 SCR (non-tampered)
- source emissions/driving share: HBEFA 3.3, status April 2017
- input parameter: distance [km], payload [t], utilisation [-], sulphur content diesel [ppm], driving share motorway/rural/urban
- average sulphur content: EU = 10 ppm

## Geography
The data set is representative for the mentioned region.

## Time period
annual average

## Technology and included processes
Truck as heavy or light duty vehicle for road transport. Variable parameters are: payload, utilisation ratio, distance, sulphur content of fuel and driving share urban/interurban/motorway. Inputs: diesel and cargo. Outputs: cargo and combustion emissions (ammonia, benzene, carbon dioxide, carbon monoxide, methane, nitrogen monoxide, nitrogen dioxide, nitrous oxide, NMVOC, particulate PM 2.5, sulphur dioxide). NMVOC emissions of the truck result from imperfect combustion and evaporation losses via diffusion through the tank. Truck production, end-of-life treatment of the truck and the fuel supply chain (emissions of exploration, refinery, transportation etc.) are not included in the data set.
For more information please refer to: http://www.gabi-software.com/index.php?id=8375

## Parameters
- utilisation: 0.53
  [-] utilisation by mass, default = 0.53
- spec_CO2_bio: 0.472273; = spec_CO2_tot * share_CO2_bio
  [gCO2/kg] weighted CO2 emission, biogenic CO2 share of CO2 emission
- spec_CH4_ru: 6.12036e-8; = (3.48789035342634E-4 + (3.88417334761471E-4 - 3.48789035342634E-4) * utilisation) / (payload * 1000 * utilisation)
  [gCH4/(kg*km)] CH4 emission rural
- spec_NO2_ru: 1.85546e-5; = (0.124599568545818 + (0.10102866590023 - 0.124599568545818) * utilisation) / (payload * 1000 * utilisation)
  [gNO2/(kg*km)] NO2 emissions rural
- ppm_sulfur: 10
  [ppm] sulphur content in diesel, default Europe = 10 ppm
- spec_SO2_mw: 5.90445e-10; = (ppm_sulfur / 1000000) * 2 * spec_diesel_mw
  [kgSO2/(kg*km)] SO2 emission motorway
- spec_CH4_tot: 6.42201e-6; = ((share_mw * spec_CH4_mw) + (share_ru * spec_CH4_ru) + (share_ur * spec_CH4_ur)) * distance
  [gCH4/kg] CH4 emission weighted
- distance: 100
  [km] distance start - end, default = 100 km
- spec_CO2_ru: 0.0909862; = (474.083526611328 + (616.829528808594 - 474.083526611328) * utilisation) / (payload * 1000 * utilisation)
  [gCO2/(kg*km)] CO2 emission rural
- spec_diesel_ru: 2.86207e-5; = (149.127899169922 + (194.030120849609 - 149.127899169922) * utilisation) / (payload * 1000 * utilisation) / 1000
  [kgdiesel/(kg*km)] diesel consumption rural
- spec_CH4_mw: 6.16873e-8; = (3.59896570444107E-4 + (3.84081125957891E-4 - 3.59896570444107E-4) * utilisation) / (payload * 1000 * utilisation)
  [gCH4/(kg*km)] CH4 emission motorway
- spec_CH4_ur: 9.94597e-8; = (5.76509337406605E-4 + (6.22596882749349E-4 - 5.76509337406605E-4) * utilisation) / (payload * 1000 * utilisation)
  [gCH4/(kg*km)] CH4 emission urban
- spec_NO_mw: 0.000222229; = (1.45056114345789 + (1.2470656633377 - 1.45056114345789) * utilisation) / (payload * 1000 * utilisation)
  [gNO/(kg*km)] NO emission motorway
- share_CO2_bio: 0.05
  [-] share of biogenic C in fuel
- spec_N2O_ur: 6.14095e-6; = (0.037103608250618) / (1000 * tonnage)
  [gN2O/(kg*km)] N2O emission urban
- spec_NMVOC_ru: 2.48895e-6; = (0.0141840884461999 + (0.0157956387847662 - 0.0141840884461999) * utilisation) / (payload * 1000 * utilisation)
  [gNMVOC/(kg*km)] NMVOC emission rural (without benzene)
- share_mw: 0.7
  [-] driving share motorway , default = 0,70
- spec_N2O_ru: 5.96314e-6; = (0.036029264330864) / (1000 * tonnage)
  [gN2O/(kg*km)] N2O emission rural
- spec_benzene_to: 4.46865e-6; = ((share_mw * spec_benzene_mw) + (share_ru * spec_benzene_ru) + (share_ur * spec_benzene_ur)) * distance
  [gbenzene/kg] benzene emission weighted
- spec_NMVOC_mw: 2.50861e-6; = (0.0146357947960496 + (0.0156192984431982 - 0.0146357947960496) * utilisation) / (payload * 1000 * utilisation)
  [gNMVOC/(kg*km)] NMVOC emission motorway (without benzene)
- spec_CO_ru: 0.000175823; = (0.978865921497344 + (1.13633215427399 - 0.978865921497344) * utilisation) / (payload * 1000 * utilisation)
  [gCO/(kg*km)] CO emission rural
- spec_benzene_ur: 6.92074e-8; = (4.01154364226386E-4 + (4.33223671279848E-4 - 4.01154364226386E-4) * utilisation) / (payload * 1000 * utilisation)
  [gbenzene/(kg*km)] benzene emission urban
- spec_NO_tot: 0.0268107; = ((share_mw * spec_NO_mw) + (share_ru * spec_NO_ru) + (share_ur * spec_NO_ur)) * distance
  [gNO/kg] NO emission weighted
- spec_CO2_ur: 0.111873; = (568.56689453125 + (771.14697265625 - 568.56689453125) * utilisation) / (payload * 1000 * utilisation)
  [gCO2/(kg*km)] CO2 emission urban
- spec_NO_ru: 0.000246511; = (1.65539432317018 + (1.3422379642725 - 1.65539432317018) * utilisation) / (payload * 1000 * utilisation)
  [gNO/(kg*km)] NO emission rural
- spec_NO2_mw: 1.67269e-5; = (0.109182022511959 + (0.0938651561737061 - 0.109182022511959) * utilisation) / (payload * 1000 * utilisation)
  [gNO2/(kg*km)] NO2 emissions motorway
- spec_CO2_mw: 0.0938524; = (508.9248046875 + (618.607177734375 - 508.9248046875) * utilisation) / (payload * 1000 * utilisation)
  [gCO2/(kg*km)] CO2 emission motorway
- spec_NO2_tot: 0.00201801; = ((share_mw * spec_NO2_mw) + (share_ru * spec_NO2_ru) + (share_ur * spec_NO2_ur)) * distance
  [gNO2/kg] NO2 emissions weighted
- spec_diesel_tot: 0.00297117; = ((share_mw * spec_Diesel_mw) + (share_ru * spec_Diesel_ru) + (share_ur * spec_Diesel_ur)) * distance
  [kgdiesel/kg] diesel consumption weighted
- payload: 11.4
  [t] default = 11,4 t
- spec_CO_mw: 0.000152308; = (0.894388139247894 + (0.943169593811035 - 0.894388139247894) * utilisation) / (payload * 1000 * utilisation)
  [gCO/(kg*km)] CO emission motorway
- spec_part_tot: 0.000460933; = ((share_mw * spec_Part_mw) + (share_ru * spec_Part_ru) + (share_ur * spec_Part_ur)) * distance
  [gparticle/kg] particle emission weighted
- share_check: 1; = share_mw + share_ru + share_ur
  Check - value must be 1
- spec_benzene_mw: 4.2924e-8; = (2.5042804190889E-4 + (2.67256429651752E-4 - 2.5042804190889E-4) * utilisation) / (payload * 1000 * utilisation)
  [gbenzene/(kg*km)] benzene emission motorway
- spec_CO2_tot: 9.44546; = ((share_mw * spec_CO2_mw) + (share_ru * spec_CO2_ru) + (share_ur * spec_CO2_ur)) * distance
  [gCO2/kg] CO2 emission weighted
- spec_diesel_mw: 2.95223e-5; = (160.087585449219 + (194.589309692383 - 160.087585449219) * utilisation) / (payload * 1000 * utilisation) / 1000
  [kgdiesel/(kg*km)] diesel consumption motorway
- spec_SO2_ru: 5.72413e-10; = (ppm_sulfur / 1000000) * 2 * spec_diesel_ru
  [kgSO2/(kg*km)] SO2 emission rural
- spec_NMVOC_ur: 4.0447e-6; = (0.0234447121620178 + (0.0253189411014318 - 0.0234447121620178) * utilisation) / (payload * 1000 * utilisation)
  [gNMVOC/(kg*km)] NMVOC emission urban (without benzene)
- spec_NH3: 4.96524e-5; = (0.00300000002607703 * distance) / (1000 * tonnage)
  [gNH3/kg)] NH3 emission in all traffic situations
- spec_CO2_fos: 8.97319; = spec_CO2_tot * (1 - share_CO2_bio)
  [gCO2/kg] weighted CO2 emission, fossil CO2 share of CO2 emission
- spec_SO2_ur: 7.03814e-10; = (ppm_sulfur / 1000000) * 2 * spec_diesel_ur
  [kgSO2/(kg*km)] SO2 emission urban
- tonnage: 6.042; = utilisation * payload
  [t]
- spec_NO_ur: 0.000797846; = (4.91660463809967 + (4.73543980717659 - 4.91660463809967) * utilisation) / (payload * 1000 * utilisation)
  [gNO/(kg*km)] NO emission urban
- spec_CO_tot: 0.0165192; = ((share_mw * spec_CO_mw) + (share_ru * spec_CO_ru) + (share_ur * spec_CO_ur)) * distance
  [gCO/kg] CO emission weighted
- spec_diesel_ur: 3.51907e-5; = (178.848617553711 + (242.572280883789 - 178.848617553711) * utilisation) / (payload * 1000 * utilisation) / 1000
  [kgdiesel/(kg*km)] diesel consumption urban
- spec_benzene_ru: 4.25875e-8; = (2.42699039517902E-4 + (2.70273711066693E-4 - 2.42699039517902E-4) * utilisation) / (payload * 1000 * utilisation)
  [gbenzene/(kg*km)] benzene emission rural
- share_ur: 0.07
  [-] driving share urban , default = 0,07
- spec_N2O_tot: 0.000571026; = ((share_mw * spec_N2O_mw) + (share_ru * spec_N2O_ru) + (share_ur * spec_N2O_ur)) * distance
  [gN2O/kg] N2O emission weighted
- spec_part_ru: 4.72293e-6; = (0.0274235457181931 + (0.0295224618166685 - 0.0274235457181931) * utilisation) / (payload * 1000 * utilisation)
  [gparticle/(kg*km)] particle emission rural
- spec_SO2_tot: 5.94234e-8; = ((share_mw * spec_SO2_mw) + (share_ru * spec_SO2_ru) + (share_ur * spec_SO2_ur)) * distance
  [kgSO2/kg] SO2 emission weighted
- spec_NO2_ur: 6.00529e-5; = (0.370067000389099 + (0.356430977582932 - 0.370067000389099) * utilisation) / (payload * 1000 * utilisation)
  [gNO2/(kg*km)] NO2 emissions urban
- spec_part_mw: 4.34531e-6; = (0.0261647962033749 + (0.0263338405638933 - 0.0261647962033749) * utilisation) / (payload * 1000 * utilisation)
  [gparticle/(kg*km)] particle emission motorway
- spec_CO_ur: 0.000259108; = (1.36513388156891 + (1.743239402771 - 1.36513388156891) * utilisation) / (payload * 1000 * utilisation)
  [gCO/(kg*km)] CO emission urban
- share_ru: 0.23
  [-] driving share rural , default = 0,23
- spec_part_ur: 6.87618e-6; = (0.0371254496276379 + (0.0454659089446068 - 0.0371254496276379) * utilisation) / (payload * 1000 * utilisation)
  [gparticle/(kg*km)] particle emission urban
- spec_NMVOC_tot: 0.000261162; = ((share_mw * spec_NMVOC_mw) + (share_ru * spec_NMVOC_ru) + (share_ur * spec_NMVOC_ur)) * distance
  [gNMVOC/kg] NMVOC emission weighted (without benzene)
- spec_N2O_mw: 5.5841e-6; = (0.0337391272187233) / (1000 * tonnage)
  [gN2O/(kg*km)] N2O emission motorway
- temp_olca_param57: 6.42201e-9; = 0.001 * spec_CH4_tot
- temp_olca_param58: 4.96524e-8; = 0.001 * spec_NH3
- temp_olca_param59: 4.60933e-7; = 0.001 * spec_part_tot
- temp_olca_param60: 2.68107e-5; = 0.001 * spec_NO_tot
- temp_olca_param61: 0.00297117; = spec_diesel_tot
- temp_olca_param62: 1.65192e-5; = 0.001 * spec_CO_tot
- temp_olca_param63: 0.000472273; = 0.001 * spec_CO2_bio
- temp_olca_param64: 5.94234e-8; = spec_SO2_tot
- temp_olca_param65: 4.46865e-9; = 0.001 * spec_benzene_to
- temp_olca_param66: 2.61162e-7; = 0.001 * spec_NMVOC_tot
- temp_olca_param67: 2.01801e-6; = 0.001 * spec_NO2_tot
- temp_olca_param68: 5.71026e-7; = 0.001 * spec_N2O_tot
- temp_olca_param69: 0.00897319; = 0.001 * spec_CO2_fos

## Reference product
- Cargo: 1

## Inputs
- Cargo: 1
- Diesel: 0.00297117; = temp_olca_param61

## Outputs
- Benzene: 4.46865e-9; = temp_olca_param65
- Dust (PM2.5): 4.60933e-7; = temp_olca_param59
- Nitrogen monoxide: 2.68107e-5; = temp_olca_param60
- Carbon monoxide: 1.65192e-5; = temp_olca_param62
- NMVOC (unspecified): 2.61162e-7; = temp_olca_param66
- Ammonia: 4.96524e-8; = temp_olca_param58
- Nitrous oxide (laughing gas): 5.71026e-7; = temp_olca_param68
- Methane: 6.42201e-9; = temp_olca_param57
- Carbon dioxide (biotic): 0.000472273; = temp_olca_param63
- Carbon dioxide: 0.00897319; = temp_olca_param69
- Nitrogen dioxide: 2.01801e-6; = temp_olca_param67
- Sulphur dioxide: 5.94234e-8; = temp_olca_param64

## Modelling constants
All data used in the calculation of the LCI results refer to net calorific value.

## Cut-off and completeness
Cut-off rules for each unit process: Coverage of at least 95 % of mass and energy of the input and output flows, and 98 % of their environmental relevance (according to expert judgement).
For further details please see the document "GaBi Databases Modelling Principles"

## Data selection and combination
All relevant background data such as energy and auxiliary material are taken from the GaBi Databases, keeping consistency.

## Data treatment and extrapolations
For details please see the document "GaBi Databases Modelling Principles"

## Review details
The LCI method applied is in compliance with ISO 14040 and 14044. The documentation includes all relevant information in view of the data quality and scope of the application of the respective LCI result / data set. The dataset represents the state-of-the-art in view of the referenced functional unit.

## Data sources
- TREMOVE 2.7 / EMISSIONS, 2007
- Transport_Truck
- Handbuch Emissionsfaktoren des Straßenverkehrs, Version 3.3, 2017
- Modell zur Simulierung umweltrelevanter Auswirkungen von Transportprozessen
- Basisdaten für ökol. Bilanzierungen,Einsatz v. Nutzfahrzeugen in Transport,Landwirtschaft u. Bergbau
- BGL - Daten und Fakten, 2006
- Richtlinie 2003/17/EG: Änderung der R 98/70/EG über die Qualität von Otto- und Dieselkraftstoffen
- EUROPA - Environment - Auto-Oil II Programme, 2000
- Emission functions for Heavy Duty Vehicles – Update Handbook Emission Factors for Road Traffic
- Statistische Mitteilungen, Reihe 2: Kraftfahrzeuge, 2003
- Emissionen und Minderungspotential von HFKW, FKW und SF6 in Deutschland Im Auftrag des UBA(29841256)
- Umweltlexikon: Betankungsverlust, 2006
- Spezifischer Energieeinsatz im Verkehr, Ermittlung und Vergl. der spezifischen Energieverbräuche
- The Auto-Oil II Programme
- UNEP SETAC Life Cycle Initiative
- GaBi conformity system
- ILCD Data Network - Entry-level
- GaBi Refinery Modelling Principles
- GaBi Water Modelling Principles
- GaBi Energy Modelling Principles
- GaBi Land Use Change Model Documentation
- GaBi Agriculture Model Documentation
- ILCD format
- GaBi Modelling Principles
- GaBi databases

## Intended applications
The data set represents a gate to gate inventory for air transportation. It can be used to characterise the supply chain situation of the respective commodity in a representative manner. Combination with individual unit processes using this commodity enables the generation of user-specific (product) LCAs. The data set does not necessarily fit for any possible specific supply situation - especially if significantly different technology routes exist - but is representative for a common supply chain situation.
