# Recycling of Aliphatic/aromatic copolyester - scrap credit (open loop) ; including CO2 Adjustment

Dataset: ILCD process, Unit process, black box
Geography: GLO
Reference year: 2018
Valid until: 2021
Classification: End-of-life treatment / Material recycling
LCI method principle: Other
Generated by: thinkstep AG
Owner: thinkstep AG
Amounts: no units in this file; such an amount is in the reference unit of its flow, which a separate flow dataset defines
copyright: true
accessRestrictions: GaBi (source code, database including extension modules and single data sets, documentation) remains property of thinkstep AG. thinkstep AG delivers GaBi licenses comprising data storage medium and manual as ordered by the customer. The license guarantees the right of use for one installation of GaBi. Further installations using the same license are not permitted. Additional licenses are only valid if the licensee holds at least one main license. Licenses are not transferable and must only be used within the licensee's organisation. Data sets may be copied for internal use. The number of copies is restricted to the number of licenses of the software system GaBi the licensee owns. The right of use is exclusively valid for the licensee. All rights reserved.

## General comment
Auxiliary process, no documentation needed.

## Time period
annual average

## Parameters
- value: 1
  [0..1] value correction substitution factor, per default 1 ; adjustable between 0 and 1
- plastic: 1
  [kg] plastic material without value correction substitution factor
- plastic_value: 1; = plastic * value
  [kg] plastic material including value correction substitution factor
- temp_olca_param3: 1; = plastic_value
- temp_olca_param4: 1; = plastic

## Reference product
- Plastic granulate (unspecified): 1; = temp_olca_param3

## Inputs
- Plastic granulate (unspecified): 1; = temp_olca_param4

## Data sources
- GaBi Refinery Modelling Principles
- GaBi Water Modelling Principles
- GaBi Energy Modelling Principles
- GaBi Land Use Change Model Documentation
- GaBi Agriculture Model Documentation
- ILCD format
- GaBi Modelling Principles
- GaBi databases

## Intended applications
This background LCI data set can be used for any types of LCA studies.
