# Intel Core i9-12900K CPU

Dataset: ILCD process, Unit process, single operation
Geography: Malaysia
Reference year: 2025
Synonyms: This BOM is for reference purposes only. Actual production specifications may vary.
Amounts: no units in this file; such an amount is in the reference unit of its flow, which a separate flow dataset defines

## General comment
LCA Analysis

## Technology and included processes
Manufacturing of Intel Core i9-12900K CPU

## Reference product
- Intel Core i9-12900K CPU: 1

## Inputs
- CPU Silicon Die: 0.015
  drawing_nr: CPU-001; group: CPU Core; material: Silicon; supplier: Intel Fabrication
- CPU Substrate: 0.025
  drawing_nr: CPU-002; group: CPU Core; material: Fiberglass-reinforced epoxy laminate; supplier: Advanced Substrate Technologies
- Integrated Heat Spreader (IHS): 0.035
  drawing_nr: CPU-003; group: CPU Core; material: Nickel-plated Copper; supplier: Metal Precision Inc.
- Thermal Interface Material: 0.002
  drawing_nr: CPU-004; group: CPU Core; material: Indium-based solder; supplier: Thermal Solutions Co.
- Microcode ROM: 0.001
  drawing_nr: CPU-005; group: CPU Core; material: Silicon; supplier: Intel Architecture Group
- Performance Cores (P-cores): 0.004
  drawing_nr: ARCH-001; group: CPU Architecture; material: Silicon; supplier: Intel Architecture Group
- Efficiency Cores (E-cores): 0.002
  drawing_nr: ARCH-002; group: CPU Architecture; material: Silicon; supplier: Intel Architecture Group
- L3 Cache: 0.003
  drawing_nr: ARCH-003; group: CPU Architecture; material: Silicon; supplier: Intel Cache Technologies
- L2 Cache: 0.002
  drawing_nr: ARCH-004; group: CPU Architecture; material: Silicon; supplier: Intel Cache Technologies
- L1 Cache: 0.001
  drawing_nr: ARCH-005; group: CPU Architecture; material: Silicon; supplier: Intel Cache Technologies
- Voltage Regulator Controller: 0.002
  drawing_nr: PWR-001; group: Power Delivery; material: Silicon; supplier: Power IC Solutions
- Power Delivery Capacitors: 0.001
  drawing_nr: PWR-002; group: Power Delivery; material: Ceramic; supplier: Capacitor Technologies
- Power Delivery Inductors: 0.002
  drawing_nr: PWR-003; group: Power Delivery; material: Copper Coil; supplier: Inductor Corp.
- Power MOSFETs: 0.001
  drawing_nr: PWR-004; group: Power Delivery; material: Silicon; supplier: Semiconductor Devices Inc.
- Power Management IC: 0.001
  drawing_nr: PWR-005; group: Power Delivery; material: Silicon; supplier: Power Management Solutions
- PCIe Controller: 0.003
  drawing_nr: IO-001; group: I/O; material: Silicon; supplier: Intel I/O Technologies
- Memory Controller: 0.002
  drawing_nr: IO-002; group: I/O; material: Silicon; supplier: Intel Memory Systems
- Integrated Graphics Processor: 0.005
  drawing_nr: IO-003; group: I/O; material: Silicon; supplier: Intel Graphics Division
- DMI Interface: 0.001
  drawing_nr: IO-004; group: I/O; material: Silicon; supplier: Intel I/O Technologies
- LGA 1700 Socket Interface: 0.004
  drawing_nr: PKG-001; group: Package; material: Gold-plated copper contacts; supplier: Socket Technologies Inc.
- Package Substrate: 0.01
  drawing_nr: PKG-002; group: Package; material: Fiberglass-reinforced epoxy laminate; supplier: Advanced Substrate Technologies
- Package Capacitors: 0.002
  drawing_nr: PKG-003; group: Package; material: Ceramic; supplier: Capacitor Technologies
- Package Resistors: 0.001
  drawing_nr: PKG-004; group: Package; material: Metal Film; supplier: Resistor Solutions
- Solder Balls: 0.003
  drawing_nr: PKG-005; group: Package; material: Lead-free solder; supplier: Solder Materials Inc.
- System Agent: 0.002
  drawing_nr: ADD-001; group: Additional; material: Silicon; supplier: Intel System Architecture
- Thermal Model Sensors: 0.001
  drawing_nr: ADD-002; group: Additional; material: Silicon; supplier: Thermal Monitoring Inc.
- Debug Interface: 0.001
  drawing_nr: ADD-003; group: Additional; material: Silicon; supplier: Debug Systems Ltd.
- Clock Generator: 0.001
  drawing_nr: ADD-004; group: Additional; material: Silicon; supplier: Timing Solutions Co.
- Security Engine: 0.001
  drawing_nr: ADD-005; group: Additional; material: Silicon; supplier: Intel Security Group
